<?xml version="1.0"?>
<!--


-->


<piston_engine name="Allison">
    <injected>1</injected>
    <minmp unit="INHG">          6.0 </minmp>
    <maxmp unit="INHG">         35.2.0 </maxmp>
    <displacement unit="IN3"> 1710</displacement>
    <maxhp>        1600 </maxhp>
    <cycles>         2.0 </cycles>
    <idlerpm>      600.0 </idlerpm>
    <maxthrottle>    1.0 </maxthrottle>
    <minthrottle>    0.15</minthrottle>
</piston_engine>
